### begin ##############
clear                  # just for fun

units           real   # mass = grams/mole
		       # distance = Angstroms
		       # time = femtoseconds
		       # energy = Kcal/mole
		       # velocity = Angstroms/femtosecond
		       # force = Kcal/mole-Angstrom
		       # temperature = Kelvin
		       # pressure = atmospheres
		       # charge = multiple of electron charge (1.0 is a proton)
		       # density = gram/cm^3

boundary        p p p  # periodic in all directions

atom_style	atomic # no bonds, angles, charges

pair_style	lj/cut 7.65 # pairwise interaction
########################

### initial conf #######
read_data       mini_final.data # read a data file
########################

### force field part ###
pair_coeff	1 1 0.238464804 3.4 7.65 # define the force field parameters
########################

### neighbor list ######
neighbor	5.0 bin # define the skin

neigh_modify	every 1 delay 10 check yes # options of the neighbor list
########################

### output definition ##
thermo		1 # every many steps output is printed

thermo_style    custom time etotal pe ke temp press # print thermodynamic variables
########################

# print the trajectory
dump		traj all custom 100 melt.lammpstrj element xu yu zu
#dump		traj all custom 100 melt.lammpstrj element x y z
dump_modify 	traj element Ar
dump_modify 	traj sort id
########################

# initialize velocities
velocity	all create 10.0 111 mom yes rot yes
########################

### MD run #############
timestep	10.0

fix		integ all nve # integrate equation of motion

fix 		thermos all temp/berendsen 10.0 500.0 1000.0 # Berendsen thermostat

#fix 		baros all press/berendsen iso 1.0 1.0 10000.0 # Berendsen barostat

#fix		integ all nvt temp 10.0 500.0 1000.0 # integrate equation of motion + Nose-Hoover thermostat

run 		10000
########################

### write data #########
write_data      melt_final.data
########################
