### simulation params ##
variable	steps_dump   equal 1000   # steps
########################

### begin ##############
clear
box		tilt large
units           metal  	# mass = grams/mole
		       	# distance = Angstroms
			# time = picoseconds
		       	# energy = eV
		       	# velocity = Angstroms/picosecond
		       	# force = eV/Angstrom
		       	# temperature = Kelvin
		       	# pressure = bars
			# charge = multiple of electron charge (1.0 is a proton)
			# density = gram/cm^3
boundary        p p p
########################

### force field (1) ####
atom_style	atomic
pair_style      tersoff
########################

### initial config #####
read_data       Si.lmp
#replicate	4 4 4
########################

### force field (2) ####
pair_coeff      * * ../Si.tersoff Si
########################

### neighbor list ######
neighbor        3.0 bin
neigh_modify    delay 0 every 1 delay 0 check yes
########################

### print trajectory ###
dump		traj all custom ${steps_dump} min.lammpstrj element x y z vx vy vz fx fy fz
dump_modify 	traj element Si
dump_modify 	traj sort id
########################


## start minimization ##
thermo          1
thermo_style    custom time lx ly lz pe fnorm fmax

fix             f1 all box/relax iso 0.0 fixedpoint 0.0 0.0 0.0 nreset 1

min_style       cg
minimize        0.0 1.0e-10 1000000 1000000

unfix		f1
undump		traj
write_data	init.data
### end minimization ###

# short NVE check 5ps ##
timestep 	0.01
reset_timestep 	0

thermo 		100
thermo_style 	custom step temp press pe ke etotal

fix		nve all nve

run 		50000

unfix 		nve
########################
